<Node name="root" gravity="0 -9810 0" dt="0.01">
    <RequiredPlugin name="Sofa.Component.IO.Mesh" />
    <RequiredPlugin name="Sofa.Component.Mass" />
    <RequiredPlugin name="Sofa.Component.StateContainer" />
    <RequiredPlugin name="Sofa.Component.ODESolver.Backward" />
    <RequiredPlugin name="Sofa.Component.LinearSolver.Iterative" />
    <RequiredPlugin name="Sofa.Component.MechanicalLoad" />
    <RequiredPlugin name="Sofa.Component.SolidMechanics.Spring" />
    <RequiredPlugin name="Sofa.Component.Topology.Container.Dynamic" />
    <RequiredPlugin name="Sofa.Component.Mapping.Linear" />
    <RequiredPlugin name="Sofa.Component.Constraint.Projective"/> <!-- Needed to use components [FixedProjectiveConstraint] -->
    <RequiredPlugin name="Sofa.Component.SceneUtility"/> <!-- Needed to use components [InfoComponent] -->
    <RequiredPlugin name="Sofa.Component.SolidMechanics.FEM.Elastic"/> <!-- Needed to use components [BeamFEMForceField] -->

    <MeshGmshLoader name="meshLoader" filename="suture.msh" />

    <DefaultAnimationLoop />
    <DefaultVisualManagerLoop />

    <!-- 3D Suture Model -->
    <Node name="FEMSuture">
        <EulerImplicitSolver rayleighMass="0.1" rayleighStiffness="0.1"/>
        <CGLinearSolver iterations="100" tolerance="1e-9" threshold="1e-9"/>

        <TetrahedronSetTopologyContainer src="@../meshLoader"/>
        <MechanicalObject name="dofs" template="Vec3d" showObject="1"/>

        <UniformMass totalMass=".05"/>
        <TetrahedronFEMForceField youngModulus="1e6" poissonRatio="0.3"/>

        <FixedProjectiveConstraint indices="0 1 2 3 4" />


    </Node>


</Node>
